*Heading
** Job name: phase_field_3D_millimeter Model name: Model-3D-millimeter
** Generated by: Abaqus/CAE 2023.HF4
*Preprint, echo=NO, model=NO, history=NO, contact=NO
**
** PARTS
**
*Part, name=plate
*Node
1,           0.,          0.5,           0.
2,           0.,           0.,           0.
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*************************************************
*User element, nodes=8, type=U1, properties=240, coordinates=3, variables=120
1, 2, 3
1, 4
1, 11
*************************************************
*ELEMENT, TYPE=U1, ELSET=SOLID
1,  355,  381,  415,  408,  852,  878,  912,  905
2,   13,   12,   87,   85,  510,  509,  584,  582
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*******************************************************
*UEL PROPERTY, ELSET=SOLID
**
** =====================
**
** MECHANICAL PROPERTIES
**
210000.0d0, 0.3, 0.0, 0.0, 0.0, 0.0, 0.0, 0.0
** Young's modulus E (MPa), Poisson ratio nu (dimless), none, none
** none, none, none, none
**
** ======================
**
** PHASE FIELD PROPERTIES
**
0.05d0, 2.7e0, 1.0e-7, 0.89, 3.0e7, 0.0, 0.0, 0.0
** length scale lc (mm), critical energy release rate Gc (N*mm/mm^2), well-conditioning parameter xkap (dimless), fitting slope to DFT data X (chi) (dimless)
** Gibbs free energy difference between the decohering interface and the surrounding material delta_g_b0 (N*mm/mol), none, none, none
**
** =============================
**
** HYDROGEN DIFFUSION PROPERTIES
**
8314.5e0, 300e0, 2000.0e0, 0.0127e0, 6.023e23, 9.24e28, 6.0, 1.0
** universal gas constant R (N*mm)/(mol*K), temperature T (K), partial molar volume VH (mm^3/mol), diffusion coefficient DL (mm^2/s)
** Avogadro constant NA (1/mol), number of solvent atoms N_L (1/m^3), number of interstitial sites per solvent atom - beta (dimless), number of H per trap site of dislocation - alpha_dis (dimless)
1.0, 1.0, 2.86e-10, -20.2e3, -58.6e3, -11.5e3, 0, 8.464e22
** number of H per trap site of grain boundaries - alpha_gb (dimless), number of H per trap site of carbides - alpha_carb (dimless), lattice parameter a_lattice (m), binding energy of H to dislocations trap WB_dis (N*m/mol)
** binding energy of H to grain boundaries trap WB_gb (N*m/mol), binding energy of H to carbides trap WB_carb (N*m/mol), number of trap type of dislocations NT_dis (1/m^2), number of trap type of grain boundaries NT_gb (1/m^2)
8.464e26, 2e16, 1e10, 0.0, 0.0, 0.0, 0.0, 0.0
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1372903929, 2.85, 1372912113, 2.9, 1372919001, 2.95, 1372924799, 3.0
**
*******************************************************
*ELEMENT, TYPE=C3D8, ELSET=VISUALIZATION
100001, 355, 381, 415, 408, 852, 878, 912, 905
100002, 13, 12, 87, 85, 510, 509, 584, 582
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*Nset, nset=whole_plate, generate
1,  26320,      1
*Elset, elset=whole_plate, generate
1,  20668,      1
** Section: Section-1
*Solid Section, elset=VISUALIZATION, material=user_material
,
*End Part
**
**
** ASSEMBLY
**
*Assembly, name=Assembly
**
*Instance, name=plate-1, part=plate
*End Instance
**
*Nset, nset=Set-6, instance=plate-1
2505, 2506, 2507, 2508, 2509, 2510
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*Elset, elset=Set-6, instance=plate-1
1841,  1848,  1849,  1850,  2146,  2157
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*Nset, nset=bottom_side, instance=plate-1
2505, 2506, 2507, 2508, 2509, 2510
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*Elset, elset=bottom_side, instance=plate-1
1841,  1848,  1849,  1850,  2146,  2157
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*Nset, nset=left_side, instance=plate-1
3,    4,   62,   63,   64,   65
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*Elset, elset=left_side, instance=plate-1
47,   48,   52,   54,   57,  132
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*Nset, nset=right_side, instance=plate-1
7203,  7204,  7205,  7206,  7207,  7208
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*Elset, elset=right_side, instance=plate-1
3608,  3609,  3610,  3672,  3684,  3690
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*Nset, nset=top_side, instance=plate-1
1,     4,    73,    74,    75,    76
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*Elset, elset=top_side, instance=plate-1
4,    51,    57,    68,   282,   283
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*Nset, nset=whole_plate, instance=plate-1, generate
1,  26320,      1
*Elset, elset=whole_plate, instance=plate-1, generate
1,  20668,      1
*End Assembly
*Amplitude, name=Amp-1
0.,              1.,       10000000.,              1.
**
** MATERIALS
**
*Material, name=user_material
*Density
1.,
*Depvar
  15,
1, AR1_sig11, AR1_sig11
2, AR2_sig22, AR2_sig22
3, AR3_sig33, AR3_sig33
4, AR4_sig12, AR4_sig12
5, AR5_sig13, AR5_sig13
6, AR6_sig23, AR6_sig23
7, AR7_eps11, AR7_eps11
8, AR8_eps22, AR8_eps22
9, AR9_eps33, AR9_eps33
10, AR10_eps12, AR10_eps12
11, AR11_eps13, AR11_eps13
12, AR12_eps23, AR12_eps23
13, AR13_phi, AR13_phi
14, AR14_sig_H, AR14_sig_H
15, AR15_CL, AR15_CL
*Specific Heat
1.,
*User Material, constants=1
0.,
**
** BOUNDARY CONDITIONS
**
** Name: BC-1 Type: Displacement/Rotation
*Boundary
bottom_side, 1, 1
bottom_side, 2, 2
bottom_side, 3, 3
**
** PREDEFINED FIELDS
**
** Name: Predefined Field-1   Type: Temperature
*Initial Conditions, type=TEMPERATURE
whole_plate, 0.5
** ----------------------------------------------------------------
**
** STEP: Step-1
**
*Step, name=Step-1, nlgeom=YES, amplitude=RAMP, inc=1000000
*Coupled Temperature-displacement, creep=none
10000., 1e+07,
**
** BOUNDARY CONDITIONS
**
** Name: BC-2 Type: Displacement/Rotation
*Boundary
top_side, 2, 2, 0.01
** Name: BC-3 Type: Temperature
*Boundary, amplitude=Amp-1
bottom_side, 11, 11, 0.5
** Name: BC-4 Type: Temperature
*Boundary, amplitude=Amp-1
left_side, 11, 11, 0.5
** Name: BC-5 Type: Temperature
*Boundary, amplitude=Amp-1
right_side, 11, 11, 0.5
**
** OUTPUT REQUESTS
**
*Restart, write, frequency=0
**
** FIELD OUTPUT: F-Output-1
**
*Output, field
*Node Output
NT, RF, U
*Element Output, directions=YES
SDV,
**
** HISTORY OUTPUT: H-Output-1
**
*Output, history, frequency=10
*Node Output, nset=bottom_side
RF2,
**
** HISTORY OUTPUT: H-Output-2
**
*Node Output, nset=top_side
U2,
*End Step
