*Heading
** Job name: NDBR6_H2_Explicit Model name: Model-1
** Generated by: Abaqus/CAE 2023
*Preprint, echo=NO, model=NO, history=NO, contact=NO
**
** PARTS
**
*Part, name=Part-1
*End Part
**
**
** ASSEMBLY
**
*Assembly, name=Assembly
**
*Instance, name=Part-1-1, part=Part-1
*Node
      1,          7.5,   4.87339735,          0.5
      2,           5.,           0.,          0.5
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*Element, type=C3D8RT
    1,   335,  2383, 14143,  1791,     1,    21,  1343,   140
    2,  2383,  2384, 14144, 14143,    21,    22,  1344,  1343
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*Nset, nset=Set-1, generate
     1,  32346,      1
*Elset, elset=Set-1, generate
     1,  25166,      1
** Section: Section-1
*Solid Section, elset=Set-1, controls=EC-1, material=DAM_MAT
,
*End Instance
**
*Node
      1,           0.,         125.,           0.
*Elset, elset=CRACK_SURF, instance=Part-1-1, generate
    57,  21375,     57
*Elset, elset=CRIT_ELE, instance=Part-1-1
    57,   114,   171,   228,   285,   342
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*Nset, nset=RF_POINT
 1,
*Elset, elset=STRESS_POINT, instance=Part-1-1
 21375,
*Nset, nset=Set-17, instance=Part-1-1, generate
     1,  32346,      1
*Elset, elset=Set-17, instance=Part-1-1, generate
     1,  25166,      1
*Nset, nset=Set-18, instance=Part-1-1
     1,     2,     3,     4,     5,     8
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*Elset, elset=Set-18, instance=Part-1-1
     1,     2,     3,     4,     5,     6
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*Nset, nset=XSYM, instance=Part-1-1
     5,     6,     7,     8,     9,    12
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*Elset, elset=XSYM, instance=Part-1-1
 21091, 21092, 21093, 21094, 21095, 21096
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*Nset, nset=YSYM, instance=Part-1-1
    2,    3,    5,    6,   77,   78
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*Elset, elset=YSYM, instance=Part-1-1, generate
    57,  21375,     57
*Nset, nset=ZSYM, instance=Part-1-1
     3,     4,     6,     7,     9,    10
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*Elset, elset=ZSYM, instance=Part-1-1
   229,   230,   231,   232,   233,   234
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*Elset, elset=_Surf-1_S5, internal, instance=Part-1-1, generate
 24047,  24054,      1
*Surface, type=ELEMENT, name=Surf-1
_Surf-1_S5, S5
** Constraint: Constraint-1
*Coupling, constraint name=Constraint-1, ref node=RF_POINT, surface=Surf-1
*Kinematic
*End Assembly
**
** ELEMENT CONTROLS
**
*Section Controls, name=EC-1, ELEMENT DELETION=YES
1., 1., 1.
*Amplitude, name=Amp-1
             0.,              0.,              1.,              1.
*Amplitude, name=Amp-2
             0.,              1.,              1.,              1.
**
** MATERIALS
**
*Material, name=DAM_MAT
*Density
 0.001,
*Depvar, delete=28
     70,
*Inelastic Heat Fraction
          1.,
*USER MATERIAL,CONSTANTS=384,TYPE=MECHANICAL
** 2 ELASTICITY, 6 BW PLASTICITY PARAMETERS
** E,NU,ceta,eta0,cthetas,cthetat,cthetac,m
 190000,0.3,0.00,0.333,1.0,1.0,1.0,6.0
** 6 DUCTILE DAMAGE INITIATION LOCUS FUNCTION PARAMETERS, FRACTURE ENERGY DISSIPATION Gf [mJOULES/MM2],
** MAXIMUM VALUE FOR DUCTILE DAMAGE VARIABLE
** Ddi1,Ddi2,Ddi3,Ddi4,Ddi5,Ddi6,Gf,Dcrit
0.02022,0.0,0.01179,2,100,0,3487.5,0.054
** 6 PARAMETERS FOR TEMPERATURE SOFTENING CORRECTION FUNCTION,
** 2 PARAMETERS FOR STRAIN RATE HARDENING CORRECTION FUNCTION (FIRST AND SECOND)
** cT1, cT2, cT3, eta2, Cp, T0, cE1, cE2
 1.82,0.01,0.90,0.9,490000000.0,253.15,0.023217,1.106919
** 1 PARAMETER FOR STRAIN RATE HARDENING CORRECTION FUNCTION (THIRD)
** NUMBER OF INCREMENTS TO UPDATE PLASTIC STRAIN RATE SDV,
** BRITTLE DAMAGE INITIATION STRESS VALUE
** CUT OFF VALUE
** 4 PARAMETERS FOR DUCTILE CRIT LOCUS
** cE3, strrInc, sigdmg, Cutoff, Ddf1, Ddf2, Ddf3, Ddf4
 0.0006,115000.0,1105.0,-0.33333,2.4976,4.1925E-06,0.8681,0
** 4 PARAMETERS FOR CLEAVAGE CRIT LOCUS
** Cc1, Cc2, Cc3, Cc4,ntempSwitch,nstrainSwitch,zero,zero
100,0,100,0,0.0,0.0,0.0,0.0
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1338.182503 ,     2.9   ,     1338.858102 ,     2.92  ,     1339.529926 ,     2.94  ,     1340.198019 ,     2.96
*USER MATERIAL, CONSTANTS=12, TYPE=THERMAL
**mu0L,CL0     ,muRL     ,NL    ,EB  ,T0 ,RGAS      ,VH
28.6E6,2.084E12,-19.576E6,5.1E20,60E6,300,8314.46262,2000
**DL   ,Avagadro,BETA, TimeScale
1.27E-2,6.023E23,6, 1650
**
** PREDEFINED FIELDS
**
** Name: Predefined Field-1   Type: Temperature
*Initial Conditions, type=TEMPERATURE
Set-17, 1.
** ----------------------------------------------------------------
**
** STEP: Step-1
**
*Step, name=Step-1, nlgeom=YES
*Dynamic Temperature-displacement, Explicit
, 1.
*Bulk Viscosity
0.06, 1.2
**
** BOUNDARY CONDITIONS
**
** Name: BC-5 Type: Temperature
*Boundary, amplitude=Amp-2
Set-18, 11, 11, 1.
** Name: DISP Type: Displacement/Rotation
*Boundary, amplitude=Amp-1
RF_POINT, 1, 1
RF_POINT, 2, 2, 0.6
RF_POINT, 3, 3
RF_POINT, 4, 4
RF_POINT, 5, 5
RF_POINT, 6, 6
** Name: XSYM Type: Symmetry/Antisymmetry/Encastre
*Boundary
XSYM, XSYMM
** Name: YSYM Type: Symmetry/Antisymmetry/Encastre
*Boundary
YSYM, YSYMM
** Name: ZSYM Type: Symmetry/Antisymmetry/Encastre
*Boundary
ZSYM, ZSYMM
**
** OUTPUT REQUESTS
**
*Restart, write, number interval=1, time marks=NO
**
** FIELD OUTPUT: F-Output-1
**
*Output, field, number interval=300
*Node Output
NT, RF, U
*Element Output, directions=YES
S, SDV, STATUS, TEMP
**
** HISTORY OUTPUT: H-Output-3
**
*Output, history
*Element Output, elset=CRIT_ELE
STATUS
**
** HISTORY OUTPUT: H-Output-1
**
*Node Output, nset=RF_POINT
RF2, U2
**
** HISTORY OUTPUT: H-Output-2
**
*Element Output, elset=STRESS_POINT
STATUS
*End Step
