** MATERIALS
**
*Material, name=QP1000
*Depvar, delete=30
     37,
*User Material, constants=3216
** Young's Modulus, Poisson Ratio
 210000,        0.3,          0.0,         0.0,            0.0,            0.0,         0.0,   0.
** Reference temperature, three parameters for temperature softening, Dens, Heat capacity,
** Specific heat fraction
 298.15,        1.0,          0.0,         0.0,       7.85e-09,    460000000.0,         0.9,   0.
** 4 parameters for strain rate hardening, User defined increment No.
    1.0,        0.0,          1.0,         0.0,          500.0,            0.0,         0.0,   0.
** Cleavage fracuture stress, 4 parameters for cleavage fracture locus
 50000.0,       4.96,         6.42,        0.11,           1.55,            0.0,         0.0,   0.
** Cut-off value, Damage energy dissipation, 6 parameters for ductile damage initiation locus,
 -0.33333333,  1.0,        1.03,        0.1,          0.86,          0.1,       1.03,  0.1
** 4 parameters for ductile fracture locus
 1.00,          0.0,         1.00,         0.0,            0.0,            0.0,         0.0,   0.
** Flow curves along 0, 45, 90 and biaxial; r-values along 0, 45 and 90
0, 339.4232649, 339.4232649, 375.2724288, 689.3565244, 0.631056633, 0.725449642, 0.620532593
0.00011, 428.7353928, 428.7353928, 496.0434717, 706.6169465, 0.631486431, 0.726059601, 0.621503163
0.0002, 475.2871244, 475.2871244, 541.4019135, 718.5880163, 0.631837022, 0.726557227, 0.622294523
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3, 1631.662868, 1619.7698, 1765.372654, 1865.17, 0.760395543, 0.918704116, 0.876097334
*Density
 7.85e-09,
