*Heading
** Job name: phase_field_plate_3D Model name: Model-3D-m
** Generated by: Abaqus/CAE 2023.HF4
*Preprint, echo=NO, model=NO, history=NO, contact=NO
**
** PARTS
**
*Part, name=plate
*Node
      1, -1.02445483e-11, 0.000500000024, 1.99999995e-05
      2,           0.,           0., 1.99999995e-05
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*Element, type=C3D8
   1,   33,  289,  285,   32,  511,  767,  763,  510
   2,   86,   12,   13,   85,  564,  490,  491,  563
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*Nset, nset=whole_plate, generate
     1,  26230,      1
*Elset, elset=whole_plate, generate
     1,  20596,      1
** Section: Section-1
*Solid Section, elset=whole_plate, material=user_material
,
*End Part
**
**
** ASSEMBLY
**
*Assembly, name=Assembly
**
*Instance, name=plate-1, part=plate
*End Instance
**
*Nset, nset=Set-6, instance=plate-1
 2456, 2457, 2458, 2459, 2460, 2461
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*Elset, elset=Set-6, instance=plate-1
  1765,  1766,  1768,  1769,  1774,  1809
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*Nset, nset=Set-7, instance=plate-1
 2456, 2457, 2458, 2459, 2460, 2461
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*Elset, elset=Set-7, instance=plate-1
  1765,  1766,  1768,  1769,  1774,  1809
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*Nset, nset=Set-8, instance=plate-1
 2456, 2457, 2458, 2459, 2460, 2461
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*Elset, elset=Set-8, instance=plate-1
  1765,  1766,  1768,  1769,  1774,  1809
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*Nset, nset=Set-9, instance=plate-1
 2456, 2457, 2458, 2459, 2460, 2461
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*Elset, elset=Set-9, instance=plate-1
  1765,  1766,  1768,  1769,  1774,  1809
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*Nset, nset=Set-10, instance=plate-1, generate
     1,  26230,      1
*Elset, elset=Set-10, instance=plate-1, generate
     1,  20596,      1
*Nset, nset=bottom_side, instance=plate-1
 2456, 2457, 2458, 2459, 2460, 2461
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*Elset, elset=bottom_side, instance=plate-1
  1765,  1766,  1768,  1769,  1774,  1809
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*Nset, nset=left_side, instance=plate-1
    3,    4,   46,   47,   48,   49
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*Elset, elset=left_side, instance=plate-1
   26,   27,   37,   42,   46,   47
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*Nset, nset=right_side, instance=plate-1
  7099,  7100,  7101,  7102,  7103,  7104
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*Elset, elset=right_side, instance=plate-1
  3472,  3473,  3547,  3553,  3558,  3562
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*Nset, nset=top_side, instance=plate-1
     1,     3,    34,    35,    36,    37
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*Elset, elset=top_side, instance=plate-1
     3,    26,    28,    29,    30,    36
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*Nset, nset=whole_plate, instance=plate-1, generate
     1,  26230,      1
*Elset, elset=whole_plate, instance=plate-1, generate
     1,  20596,      1
*End Assembly
*Amplitude, name=Amp-1
             0.,              1.,       10000000.,              1.
**
** MATERIALS
**
*Material, name=user_material
*Density
1.,
*Depvar
     15,
*Specific Heat
1.,
*User Material, constants=1
0.,
**
** BOUNDARY CONDITIONS
**
** Name: BC-1 Type: Displacement/Rotation
*Boundary
bottom_side, 1, 1
bottom_side, 2, 2
bottom_side, 3, 3
**
** PREDEFINED FIELDS
**
** Name: Predefined Field-1   Type: Temperature
*Initial Conditions, type=TEMPERATURE
Set-10, 0.5
** ----------------------------------------------------------------
**
** STEP: Step-1
**
*Step, name=Step-1, nlgeom=YES, amplitude=RAMP, inc=1000000
*Coupled Temperature-displacement, creep=none, deltmx=10.
1000., 1e+07, 100., 1000.
**
** BOUNDARY CONDITIONS
**
** Name: BC-1 Type: Displacement/Rotation
*Boundary, op=NEW, amplitude=Amp-1
bottom_side, 1, 1
bottom_side, 2, 2
bottom_side, 3, 3
** Name: BC-2 Type: Displacement/Rotation
*Boundary, op=NEW
top_side, 2, 2, 1e-05
** Name: BC-3 Type: Temperature
*Boundary, op=NEW, amplitude=Amp-1
bottom_side, 11, 11, 0.5
** Name: BC-4 Type: Temperature
*Boundary, op=NEW, amplitude=Amp-1
left_side, 11, 11, 0.5
** Name: BC-5 Type: Temperature
*Boundary, op=NEW, amplitude=Amp-1
right_side, 11, 11, 0.5
**
** OUTPUT REQUESTS
**
*Restart, write, frequency=0
**
** FIELD OUTPUT: F-Output-1
**
*Output, field
*Node Output
NT, RF, U
*Element Output, directions=YES
E, SDV
*Output, history, frequency=0
*End Step
