*Heading
** Job name: phase_field_plate_3D Model name: Model-3D-m
** Generated by: Abaqus/CAE 2023.HF4
*Preprint, echo=NO, model=NO, history=NO, contact=NO
**
** PARTS
**
*Part, name=plate
*Node
1, -1.02445483e-11, 0.000500000024, 1.99999995e-05
2,           0.,           0., 1.99999995e-05
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*************************************************
*User element, nodes=8, type=U1, properties=240, coordinates=3, variables=120
1, 2, 3
1, 12
1, 11
*************************************************
*ELEMENT, TYPE=U1, ELSET=SOLID
1,   33,  289,  285,   32,  511,  767,  763,  510
2,   86,   12,   13,   85,  564,  490,  491,  563
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*******************************************************
*UEL PROPERTY, ELSET=SOLID
**
** =====================
**
** MECHANICAL PROPERTIES
**
210e9, 0.3, 0.0, 0.0, 0.0, 0.0, 0.0, 0.0
** Young's modulus E (Pa), Poisson ratio nu (dimless), none, none
** none, none, none, none
**
** ======================
**
** PHASE FIELD PROPERTIES
**
5.0e-5, 2700e0, 1.0e-7, 0.89, 30000.0e0, 0.0, 0.0, 0.0
** length scale lc (m), critical energy release rate Gc (N*m/m^2), well-conditioning parameter xkap (dimless), fitting slope to DFT data X (chi) (dimless)
** Gibbs free energy difference between the decohering interface and the surrounding material delta_g_b0 (N*m/mol), none, none, none
**
** =============================
**
** HYDROGEN DIFFUSION PROPERTIES
**
8.3145e0, 300e0, 2e-6, 1.27e-8, 6.023e23, 9.24e28, 6.0, 1.0
** universal gas constant R (N*m)/(mol*K), temperature T (K), partial molar volume VH (m^3/mol), diffusion coefficient DL (m^2/s)
** Avogadro constant NA (1/mol), number of solvent atoms N_L (1/m^3), number of interstitial sites per solvent atom - beta (dimless), number of H per trap site of dislocation - alpha_dis (dimless)
1.0, 1.0, 2.86e-10, -20.2e3, -58.6e3, -11.5e3, 0, 8.464e22
** number of H per trap site of grain boundaries - alpha_gb (dimless), number of H per trap site of carbides - alpha_carb (dimless), lattice parameter a_lattice (m), binding energy of H to dislocations trap WB_dis (N*m/mol)
** binding energy of H to grain boundaries trap WB_gb (N*m/mol), binding energy of H to carbides trap WB_carb (N*m/mol), number of trap type of dislocations NT_dis (1/m^2), number of trap type of grain boundaries NT_gb (1/m^2)
8.464e26, 2e16, 1e10, 0.0, 0.0, 0.0, 0.0, 0.0
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1372903929, 2.85, 1372912113, 2.9, 1372919001, 2.95, 1372924799, 3.0
**
*******************************************************
*ELEMENT, TYPE=C3D8, ELSET=VISUALIZATION
100001, 33, 289, 285, 32, 511, 767, 763, 510
100002, 86, 12, 13, 85, 564, 490, 491, 563
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*Nset, nset=whole_plate, generate
1,  26230,      1
*Elset, elset=whole_plate, generate
1,  20596,      1
** Section: Section-1
*Solid Section, elset=VISUALIZATION, material=user_material
,
*End Part
**
**
** ASSEMBLY
**
*Assembly, name=Assembly
**
*Instance, name=plate-1, part=plate
*End Instance
**
*Nset, nset=Set-6, instance=plate-1
2456, 2457, 2458, 2459, 2460, 2461
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*Elset, elset=Set-6, instance=plate-1
1765,  1766,  1768,  1769,  1774,  1809
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*Nset, nset=Set-7, instance=plate-1
2456, 2457, 2458, 2459, 2460, 2461
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*Elset, elset=Set-7, instance=plate-1
1765,  1766,  1768,  1769,  1774,  1809
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*Nset, nset=Set-8, instance=plate-1
2456, 2457, 2458, 2459, 2460, 2461
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*Elset, elset=Set-8, instance=plate-1
1765,  1766,  1768,  1769,  1774,  1809
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*Nset, nset=Set-9, instance=plate-1
2456, 2457, 2458, 2459, 2460, 2461
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*Elset, elset=Set-9, instance=plate-1
1765,  1766,  1768,  1769,  1774,  1809
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*Nset, nset=Set-10, instance=plate-1, generate
1,  26230,      1
*Elset, elset=Set-10, instance=plate-1, generate
1,  20596,      1
*Nset, nset=bottom_side, instance=plate-1
2456, 2457, 2458, 2459, 2460, 2461
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*Elset, elset=bottom_side, instance=plate-1
1765,  1766,  1768,  1769,  1774,  1809
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*Nset, nset=left_side, instance=plate-1
3,    4,   46,   47,   48,   49
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*Elset, elset=left_side, instance=plate-1
26,   27,   37,   42,   46,   47
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*Nset, nset=right_side, instance=plate-1
7099,  7100,  7101,  7102,  7103,  7104
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*Elset, elset=right_side, instance=plate-1
3472,  3473,  3547,  3553,  3558,  3562
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*Nset, nset=top_side, instance=plate-1
1,     3,    34,    35,    36,    37
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*End Assembly
*Amplitude, name=Amp-1
0.,              1.,       10000000.,              1.
**
** MATERIALS
**
*Material, name=user_material
*Density
1.,
*Depvar
  15,
1, AR1_sig11, AR1_sig11
2, AR2_sig22, AR2_sig22
3, AR3_sig33, AR3_sig33
4, AR4_sig12, AR4_sig12
5, AR5_sig13, AR5_sig13
6, AR6_sig23, AR6_sig23
7, AR7_eps11, AR7_eps11
8, AR8_eps22, AR8_eps22
9, AR9_eps33, AR9_eps33
10, AR10_eps12, AR10_eps12
11, AR11_eps13, AR11_eps13
12, AR12_eps23, AR12_eps23
13, AR13_phi, AR13_phi
14, AR14_sig_H, AR14_sig_H
15, AR15_CL, AR15_CL
*Specific Heat
1.,
*User Material, constants=1
0.,
**
** BOUNDARY CONDITIONS
**
** Name: BC-1 Type: Displacement/Rotation
*Boundary
bottom_side, 1, 1
bottom_side, 2, 2
bottom_side, 3, 3
**
** PREDEFINED FIELDS
**
** Name: Predefined Field-1   Type: Temperature
*Initial Conditions, type=TEMPERATURE
Set-10, 0.5
** ----------------------------------------------------------------
**
** STEP: Step-1
**
*Step, name=Step-1, nlgeom=YES, amplitude=RAMP, inc=1000000
*Coupled Temperature-displacement, creep=none, deltmx=10.
1000., 1e+07, 100., 1000.
**
** BOUNDARY CONDITIONS
**
** Name: BC-1 Type: Displacement/Rotation
*Boundary, op=NEW, amplitude=Amp-1
bottom_side, 1, 1
bottom_side, 2, 2
bottom_side, 3, 3
** Name: BC-2 Type: Displacement/Rotation
*Boundary, op=NEW
top_side, 2, 2, 1e-05
** Name: BC-3 Type: Temperature
*Boundary, op=NEW, amplitude=Amp-1
bottom_side, 11, 11, 0.5
** Name: BC-4 Type: Temperature
*Boundary, op=NEW, amplitude=Amp-1
left_side, 11, 11, 0.5
** Name: BC-5 Type: Temperature
*Boundary, op=NEW, amplitude=Amp-1
right_side, 11, 11, 0.5
**
** OUTPUT REQUESTS
**
*Restart, write, frequency=0
**
** FIELD OUTPUT: F-Output-1
**
*Output, field
*Node Output
NT, RF, U
*Element Output, directions=YES
E, SDV
*Output, history, frequency=0
*End Step
