*Heading
** Job name: phase_field_plate Model name: Model-2
** Generated by: Abaqus/CAE 2023.HF4
*Preprint, echo=NO, model=NO, history=NO, contact=NO
**
** PARTS
**
*Part, name=plate
*Node
1, 0.0643564388,           0.
2,  0.123762377,           0.
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*************************************************
*User element, nodes=8, type=U1, properties=5, coordinates=2, var=44
1,2
1,3
1,11
*************************************************
*ELEMENT, TYPE=U1, ELSET=SOLID
1,   257,   258,   319,   318,  5501,  5502,  5503,  5504
2,   258,   259,   355,   319,  5505,  5506,  5507,  5502
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*******************************************************
*UEL PROPERTY, ELSET=SOLID
210000., 0.3, 0.05, 2.7, 0.0127
** Young's modulus E, Poisson ratio nu, length scale lc
** critical energy release rate Gc, diffusivity D
*******************************************************
*ELEMENT, TYPE=CPE8R, ELSET=VISUALIZATION
10001, 257, 258, 319, 318, 5501, 5502, 5503, 5504
10002, 258, 259, 355, 319, 5505, 5506, 5507, 5502
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*Nset, nset=whole_plate, generate
1,  16403,      1
*Elset, elset=whole_plate, generate
1,  5404,     1
** Section: Section-1
*Solid Section, elset=VISUALIZATION, material=user_material
,
*End Part
**
**
** ASSEMBLY
**
*Assembly, name=Assembly
**
*Instance, name=plate-1, part=plate
*End Instance
**
*Nset, nset=bottom_side, instance=plate-1
2838,  2852,  2855,  2856,  2857,  2859
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*Elset, elset=bottom_side, instance=plate-1
2741, 2750, 2759, 2760, 2847, 2856
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*Nset, nset=left_side, instance=plate-1
37,    38,    39,    40,    41,    42
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*Elset, elset=left_side, instance=plate-1
156,  158,  159,  160,  161,  162
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*Nset, nset=right_side, instance=plate-1
9,    10,    11,    12,    13,    14
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*Elset, elset=right_side, instance=plate-1
60,   69,   78,   85,   90,   95
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*Nset, nset=top_side, instance=plate-1
19,    20,    21,    22,    23,    24
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*Elset, elset=top_side, instance=plate-1
13,   14,   68,   77,   84,   89
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*Nset, nset=whole_plate, instance=plate-1, generate
1,  16403,      1
*Elset, elset=whole_plate, instance=plate-1, generate
1,  5404,     1
*End Assembly
*Amplitude, name=Amp-1
0.,              1.,       10000000.,              1.
**
** MATERIALS
**
*Material, name=user_material
*Density
1.,
*Depvar
  11,
1, S11, S11
2, S22, S22
3, S33, S33
4, S12, S12
5, E11, E11
6, E22, E22
7, E33, E33
8, E12, E12
9, PHI, PHI
10, SH, SH
11, CL, CL
*Specific Heat
1.,
*User Material, constants=1
0.,
**
** BOUNDARY CONDITIONS
**
** Name: BC-1 Type: Displacement/Rotation
*Boundary
bottom_side, 1, 1
bottom_side, 2, 2
**
** PREDEFINED FIELDSautoscript_meter.py
**
** Name: Predefined Field-1   Type: Temperature
*Initial Conditions, type=TEMPERATURE
whole_plate, 0.5
** ----------------------------------------------------------------
**
** STEP: Step-1
**
*Step, name=Step-1, nlgeom=NO, amplitude=RAMP, inc=1000000
*Coupled Temperature-displacement, creep=none
10000., 1e+07,
**
** BOUNDARY CONDITIONS
**
** Name: BC-2 Type: Displacement/Rotation
*Boundary
top_side, 2, 2, 0.01
** Name: BC-3 Type: Temperature
*Boundary, amplitude=Amp-1
bottom_side, 11, 11, 0.5
** Name: BC-4 Type: Temperature
*Boundary, amplitude=Amp-1
left_side, 11, 11, 0.5
** Name: BC-5 Type: Temperature
*Boundary, amplitude=Amp-1
right_side, 11, 11, 0.5
**
** OUTPUT REQUESTS
**
*Restart, write, frequency=0
**
** FIELD OUTPUT: F-Output-1
**
*Output, field
*Node Output
CF, NT, RF, RFL, U
*Element Output, directions=YES
E, HFL, SDV
**
** HISTORY OUTPUT: H-Output-1
**
*Output, history, frequency=10
*Node Output, nset=bottom_side
RF2,
**
** HISTORY OUTPUT: H-Output-2
**
*Node Output, nset=top_side
U2,
*End Step
